a := sqrt(30) = 5.47723
b := 7/15 = 0.466667
a1 := 5.48
b1 := 0.467
Δa := |a - a1| = 0.00277442
Δb := |b - 0.467| = 0.000333333
δa := Δa/|a| = 0.000506538
δb := Δb/|b| = 0.000714286
result := δa < δb = 1
