a := 13.5
Δa := 0.02
b := 3.7
Δb := 0.02
c := 34.5
Δc := 0.02
m := 4.22
Δm := 0.004
d := 23.725
Δd := 0.005
# Значение функции
X := m^3*(a + b)/(c - d) = 119.963
# Относительные погрешности
δa := Δa/|a| = 0.00148148
δb := Δb/|b| = 0.00540541
δc := Δc/|c| = 0.00057971
δd := Δd/|d| = 0.000210748
δm := Δm/|m| = 0.000947867
# Поэтапное определение погрешностей
δ1 := (Δa + Δb)/|a + b| = 0.00232558
δ2 := 3*δm = 0.0028436
δ3 := δ1 + δ2 = 0.00516918
δ4 := (Δc + Δd)/|c - d| = 0.00232019
δ51 := δ3 + δ4 = 0.00748937
ΔX1 := δ51*|X| = 0.89845
# Общая формула погрешностей
ΔX2 := |m^3/(c - d)|*Δa + |m^3/(c - d)|*Δb + |m^3*(a + b)/(c - d)^2|*Δc + |m^3*(a + b)/(c - d)^2|*Δd + |m^2*(a + b)/(c - d)^2|*Δm = 0.567875
δ52 := ΔX2/|X| = 0.00473374
